# Проектирование радиопокрытия мобильных сетей. Модели распространения сигналов.
# Бюджеты каналов.
# Исходные данные:
TxPowerBS := 46  # дБм
BW_UL := 10  # МГц
f_Hz := 1.8*10^9  # Гц  # - Для FSPM
TxPowerUE := 24  # дБм
BW_DL := 20  # МГц
f_GHz := 1.8  # ГГц  # - Для UMiNLOS
NoiseFigureBS := 2.4  # дБ
NoiseFigureUE := 6  # дБ
Lclutter := 0
f_MHz := 1800  # МГц  # - Для COST 231 Hata
RequiredSINR_UL := 4  # дБ
c_sv := 3*10^8
h := 20  # м
RequiredSINR_DL := 2  # дБ
w := 18  # м
AntGainBS := 21  # дБи
hbs := 30  # м
b := 40  # м
IM := 1  # дБ
hms := 1.5  # м
φ := 30
PenetrationM := 15  # дБ
# 1. Расчет чувствительности приемников
ThermalNoise_UL := -174 + 10*log(BW_UL*10^6) = -104  # дБм
ThermalNoise_DL := -174 + 10*log(BW_DL*10^6) = -100.99  # дБм
RxSensBS := NoiseFigureBS + ThermalNoise_UL + RequiredSINR_UL = -97.6  # дБм
RxSensUE := NoiseFigureUE + ThermalNoise_DL + RequiredSINR_DL = -92.9897  # дБм
# 2. Расчет потери в антенно-фидерном тракте
FeederLoss := 2 + 0.4 + 0.5 = 2.9  # дБ
(фидер + МШУ + джампер)
MIMOGain := 3  # дБ
# 3. Бюджет нисходящего канала (DL)
MAPL_DL := TxPowerBS - FeederLoss + AntGainBS + MIMOGain - IM - PenetrationM - RxSensUE = 144.09  # дБ
# 4. Бюджет восходящего канала (UL)
MAPL_UL := TxPowerUE - FeederLoss + AntGainBS + MIMOGain - IM - PenetrationM - RxSensBS = 126.7  # дБ
# 5. Построение зависимостей
PL_FSPM(d) := 20*log(4*3.14*d*f_Hz/c_sv)
d := 10, 11 .. 2000
PL_UMiNLOS(d) := 26*log(f_GHz) + 22.7 + 36.7*log(d)
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# Модель Окумура-Хата и ее модификация COST231
d_km := 0.01, 0.02 .. 5
a_hms := 3.2*log(11.75*hms)^2 - 4.97
d_km1 := 0.01, 0.02 .. 0.99
s1 := 44.9 - 6.55*log(f_MHz)
d_km2 := 1, 1.01 .. 5
s2 := (47.88 + 13.9*log(f_MHz) - 13.9*log(hbs))/log(50)
PL_Hata_1(d_km2) := 46.3 + 33.9*log(f_MHz) - 13.82*log(hbs) - a_hms + s1*log(d_km2) + Lclutter
PL_Hata_2(d_km1) := 46.3 + 33.9*log(f_MHz) - 13.82*log(hbs) - a_hms + s2*log(d_km1) + Lclutter
# Модель Walfish-Ikegami LOS
PL_WI(d_km) := 42.6 + 20*log(f_MHz) + 26*log(d_km)
# Модель Walfish-Ikegami Non-LOS
L0(d_km) := 32.44 + 20*log(f_MHz) + 20*log(d_km)
ka := 54
kd := 18
L11 := -18*log(1 + hbs - h)
kf := -4 + 0.7*(f_MHz/925 - 1)
L1(d_km) := L11 + ka + kd*log(d_km) + kf*log(f_MHz) - 9*log(b)
L2(d_km) := -16.9 - 10*log(w) + 10*log(f_MHz) + 20*log(h - hms) + (-10 + 0.354*φ)
PL_WI_NonLOS(d_km) := L0(d_km) + L1(d_km) + L2(d_km)
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L1(d_km) = [
    -26.0292; -20.6106; -17.441; -15.1921; -13.4477; -12.0225; -10.8174; -9.77356; -8.85281; -8.02918
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]
L2(d_km) = [
    29.0634; 29.0634; 29.0634; 29.0634; 29.0634; 29.0634; 29.0634; 29.0634; 29.0634; 29.0634
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]
# 6. Радиусы сот
# Макросоты (COST 231 Hata)
R_UL := root(PL_Hata_2(d_km1) - MAPL_UL, d_km1, 0.01, 0.99)
R_UL = 0.59802  # кв. км
R_DL := root(PL_Hata_1(d_km2) - MAPL_DL, d_km2, 1.01, 5)
R_DL = 2.15223  # кв. км
R_macro := min(R_UL, R_DL)
R_macro = 0.59802  # кв. км
# Микро- и фемтосоты (UMiNLOS)
Ri_UL := root(PL_UMiNLOS(d) - MAPL_UL, d, 10, 2000)
Ri_UL = 449.718  # кв. м
Ri_DL := root(PL_UMiNLOS(d) - MAPL_DL, d, 10, 2000)
Ri_DL = 1338.98  # кв. м
R_in := min(Ri_UL, Ri_DL)
R_in = 449.718  # кв. м
# Площадь покрытия
k := 1.95
S_macro := k*R_macro^2
S_macro = 0.697374  # кв. км
S_in := k*R_in^2
S_in = 394381  # кв. м
S_in_m := S_in/1000000
S_in_m = 0.394381  # кв. км
# Число базовых станций
N_macro := ceil(100/S_macro)
N_macro = 144
N_in := ceil(4/S_in_m)
N_in = 11
